// COMSOL Multiphysics 5.6.0.401 model "UnitCell.mph"
// Outline of the model tree
// Unit system: none

Geometry
  geom1 "Geometry 1" (2D, length unit m)
    sq1: Square | size = 0.01
    c1: Circle | pos = {0.01/2, 0.01/2}; r = 0.01/5
    dif1: Difference | input = sq1; input2 = c1
    fin: Finalize "Form Union"

Physics
  spf: LaminarFlow on all domains
    dependent variable u = {u, v, w}
    PhysicalModelProperty.StokesFlowProp = 0
    PhysicalModelProperty.Tref = 0
    PhysicalModelProperty.pref = 0
    fp1: FluidProperties (default) | rho_mat = userdef; rho = 1000; mu_mat = userdef; mu = 3
    init1: init "Initial Values 1" (default)
    wallbc1: WallBC "Wall 1" (default)
    pfc1: PeriodicFlowCondition on boundaries 2, 3 | destinationDomains: boundaries 3
    pfc2: PeriodicFlowCondition on boundaries 1, 4 | destinationDomains: boundaries 4
    prpc1: PressurePointConstraint on points 1, 2, 7, 8
    vf1: VolumeForce on domains 1 | F = {1, 1, 0}

Mesh
  mesh1 "Mesh 1"
    size: MeshSizeDefault | hmax = 0.01/8; hmin = 0.01/8; hgrad = 1.5; custom = on
    dis1: Distribution on boundaries 1-4 | numelem = 8
    dis2: Distribution on boundaries 5-8 | numelem = 4
    edg1: Edge on all boundaries
    fq1: FreeQuad on remaining entities
    ref1: Refine on entire geometry

Studies
  std1 "Study 1"
    stat: Stationary

Solver configurations
  sol1 "Solution 1" (study std1)
    v1: Variables "Dependent Variables 1"
    s1: Stationary "Stationary Solver 1" | stol = 1e-12
      fc1: FullyCoupled | linsolver = d1; initstep = 0.01; maxiter = 100
      d1: Direct "Direct, fluid flow variables (spf)" | linsolver = pardiso; pivotperturb = 1.0E-13

Datasets
  dset1: Solution | solution = sol1

Derived values
  av1: AvSurface "Surface Average 1" on domains 1 | data = dset1; expr = u*(0.01^2-pi*(0.01/5)^2)/0.01^2
  av2: AvSurface "Surface Average 2" on domains 1 | data = dset1; expr = v*(0.01^2-pi*(0.01/5)^2)/0.01^2